*Heading
** Job name: Job-1 Model name: Model-1
** Generated by: Abaqus/CAE 2022
*Preprint, echo=NO, model=NO, history=NO, contact=NO
**
** PARTS
**
*Part, name=Part-1
*End Part
**
**
** ASSEMBLY
**
*Assembly, name=Assembly
**
*Instance, name=Part-1-1, part=Part-1
*Node
      1,  0.200000001,  0.200000001,           2.
      2,  0.200000001,           0.,           2.
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*Element, type=C3D8T
 1, 103, 104, 106, 105,   1,   2,   4,   3
 2, 105, 106, 108, 107,   3,   4,   6,   5
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*Nset, nset=Set-1, generate
   1,  204,    1
*Elset, elset=Set-1, generate
  1,  50,   1
** Section: Section-1
*Solid Section, elset=Set-1, material=Void
,
*End Instance
**
*Nset, nset=Flux_nodes, instance=Part-1-1
 101, 102, 203, 204
*Nset, nset=Set-X1, instance=Part-1-1
 101, 102, 203, 204
*Elset, elset=Set-X1, instance=Part-1-1
 50,
*Nset, nset=Set-X2, instance=Part-1-1
   1,   2, 103, 104
*Elset, elset=Set-X2, instance=Part-1-1
 1,
*Nset, nset=Volume, instance=Part-1-1, generate
   1,  204,    1
*Elset, elset=Volume, instance=Part-1-1, generate
  1,  50,   1
*End Assembly
**
** MATERIALS
**
*Material, name=Void
*Density
1.,
*Depvar
     10,
*User Material, constants=1, type=THERMAL
1.,
*User Material, constants=2, type=MECHANICAL
1.,1.
**
** PREDEFINED FIELDS
**
** Name: Predefined Field-1   Type: Temperature
*Initial Conditions, type=TEMPERATURE
Volume, 0.
** ----------------------------------------------------------------
**
** STEP: Step-1
**
*Step, name=Step-1, nlgeom=YES, inc=1000000
*Coupled Temperature-displacement, creep=none, deltmx=1e+20
0.01, 200., 1e-15, 1.
**
** BOUNDARY CONDITIONS
**
** Name: CL1 Type: Temperature
*Cflux
Flux_nodes, 11, 2e11
** Name: CL2 Type: Temperature
**
** OUTPUT REQUESTS
**
*Restart, write, frequency=0
**
** FIELD OUTPUT: F-Output-1
**
*Output, field
*Node Output
CF, NT, RF, RFL, U
*Element Output, directions=YES
HFL, IVOL, LE, PE, PEEQ, PEMAG, S, SDV
*Contact Output
CDISP, CSTRESS
**
** HISTORY OUTPUT: H-Output-1
**
*Output, history, variable=PRESELECT
*End Step
** ----------------------------------------------------------------
**
** STEP: Step-2
**
*Step, name=Step-2, nlgeom=YES, inc=1000000
*Coupled Temperature-displacement, creep=none, deltmx=1e+20
0.001, 800., 1e-15, 1.
**
** BOUNDARY CONDITIONS
**
** Name: CL1 Type: Temperature
*Cflux, op=NEW
Flux_nodes, 11, 0.
**
** OUTPUT REQUESTS
**
*Restart, write, frequency=0
**
** FIELD OUTPUT: F-Output-1
**
*Output, field
*Node Output
CF, NT, RF, RFL, U
*Element Output, directions=YES
HFL, IVOL, LE, PE, PEEQ, PEMAG, S, SDV
*Contact Output
CDISP, CSTRESS
**
** HISTORY OUTPUT: H-Output-1
**
*Output, history, variable=PRESELECT
*End Step
